ring wing test
0.05
0   0   0
10   2   25
0   0   0
0
#
#--------------------------------
#
SURFACE
RING WING
# Nchordwise  Cspace   Nspanwise   Sspace
10         1      20        1
#
YDUPLICATE
0.0
#
ANGLE
0.00
#
# x,y,z bias for whole surface
TRANSLATE
0.00    0.00      0.00
#----------------------------------------------------------
    Xle         Yle         Zle         chord       angle   Nspan  Sspace
SECTION
0.000000 0.000000 4.000000 2.000000 9.000000
NACA
0012
SECTION
0.000000 0.618034 3.902113 2.000000 9.000000
NACA
0012
SECTION
0.000000 1.175571 3.618034 2.000000 9.000000
NACA
0012
SECTION
0.000000 1.618034 3.175571 2.000000 9.000000
NACA
0012
SECTION
0.000000 1.902113 2.618034 2.000000 9.000000
NACA
0012
SECTION
0.000000 2.000000 2.000000 2.000000 9.000000
NACA
0012
SECTION
0.000000 1.902113 1.381966 2.000000 9.000000
NACA
0012
SECTION
0.000000 1.618034 0.824429 2.000000 9.000000
NACA
0012
SECTION
0.000000 1.175571 0.381966 2.000000 9.000000
NACA
0012
SECTION
0.000000 0.618034 0.097887 2.000000 9.000000
NACA
0012
SECTION
0  0   0  2.000000   9.000000
NACA
0012
